variable N equal 2500
variable alpha equal 0.0
variable S equal 999999
variable T equal 273.15
variable d string lammps.data
variable r string binary.restart
variable t string traj.xyz

clear

units            real
atom_style       full
timestep      2.0

dimension        3
boundary         p p p


special_bonds lj 0.0 0.0 0.5 coul 0.0 0.0 0.8333333333
pair_style lj/cut/coul/long/soft 1.0 0.5 10.0 8.0 8.0
bond_style harmonic
angle_style harmonic
dihedral_style opls
improper_style cvff

read_data        $d

kspace_style     pppm 1.0e-4
kspace_modify gewald 0.001 compute no

neighbor         2.0 bin
neigh_modify     delay 10 every 1 check yes once no

velocity      all create $T $S dist gaussian mom no rot no
thermo_style     custom time temp pe ke press vol density
thermo           10

fix 1 all nvt temp $T $T 20.0

dump DUMPFILE all xyz 1 $t
dump_modify DUMPFILE element C N C C H C H C O H C H C H H C H H H O

fix 2 all adapt 0 pair lj/cut/coul/long/soft lambda * * v_alpha reset yes scale yes

run          $N

write_restart $r
